/*
This is the main file to add the SimplePelvis model to the Thoracic model of AMMR4 Beta
*/

// set anthropometrics according to subject
Main.HumanModel.Anthropometrics = {
  // values from Gmür et al., 2025, meean values for control group
  BodyMass = 60.5;
  BodyHeight = 1.66;
};

// SCALING
#include "SimplePelvisScaling.any"


// SEGMENTS AND NODES
#include "SimplePelvisSegments.any"


// JOINTS + FDK
#include "SimplePelvisJoints.any"


// MUSCLES
#include "SimplePelvisMuscles.any"


// LIGAMENTS
#include "SimplePelvisLigaments.any"


// DRIVERS
#include "SimplePelvisDrivers.any"


// KINEMATIC MEASURES
Main.DrawSettings.KinematicVolume = {
  Opacity = 0.1;
};
